$PROBLEM
$INPUT Age Weight Height Fat SCR ALT AST ALP Albumin BR Race Sex CLCR BMI Obese ID AMT TIME ADDL II EVID CMT STUD MDV DV
$DATA strm_15_sm_1_covmodel_3_table.csv IGNORE=@
$SUBROUTINES ADVAN13 TOL=9
$MODEL COMPARTMENT=(DEPOT DEFDOSE) COMPARTMENT=(CENTRAL) COMPARTMENT=(PERIPHERAL1) COMPARTMENT=(PERIPHERAL2)
$PK
ETA_V1=ETA(1)
ETA_CL=ETA(2)
ETA_V2=ETA(3)
ETA_V3=ETA(4)
ETA_KA=ETA(5)
TVKM = THETA(9)
KM = TVKM
TVVMAX = THETA(8)
VMAX = TVVMAX
TVCL = THETA(7)
CL = TVCL*EXP(ETA_CL)
TVKA = THETA(6)
KA = TVKA*EXP(ETA_KA)
TVQ3 = THETA(5)
Q3 = TVQ3
TVQ2 = THETA(4)
Q2 = TVQ2
TVV3 = THETA(3)
V3 = TVV3*EXP(ETA_V3)
TVV2 = THETA(2)
V2 = TVV2*EXP(ETA_V2)
TVV1 = THETA(1)
V1 = TVV1*EXP(ETA_V1)
$DES
DADT(1) = -A(1)*KA
DADT(2) = A(1)*KA + A(2)*(-CL/V1 - Q2/V1 - Q3/V1 - VMAX/(V1*(A(2)/V1 + KM))) + A(3)*Q2/V2 + A(4)*Q3/V3
DADT(3) = A(2)*Q2/V1 - A(3)*Q2/V2
DADT(4) = A(2)*Q3/V1 - A(4)*Q3/V3
$ERROR
IPRED = A(2)/V1
Y = IPRED + EPS(1)*IPRED + EPS(2)
$THETA  (0,628.0) ; POP_V1
$THETA  (0,1400.0) ; POP_V2
$THETA  (0,500.0) ; POP_V3
$THETA  (0,18.0) ; POP_Q2
$THETA  (0,4.9) ; POP_Q3
$THETA  (0,0.75) ; POP_KA
$THETA  (0,15.0) ; POP_CL
$THETA  (0,150.0) ; POP_VMAX
$THETA  (0,10.0) ; POP_KM
$OMEGA BLOCK(2)
0.0392207131532813	; IIV_V1
0.0078441426306562	; IIV_CL_IIV_V1
0.0488112136893619	; IIV_CL
$OMEGA  0.0392207131532813 ; IIV_V2
$OMEGA  0.0392207131532813 ; IIV_V3
$OMEGA  0.0392207131532813 ; IIV_KA
$SIGMA  0.0024968801985871 ; sigma_prop
$SIGMA  1e-05 FIX ; sigma_add
$ESTIMATION METHOD=COND INTER MAXEVAL=99999 SIGDIGITS = 3
$COVARIANCE MATRIX=R UNCONDITIONAL PRINT=E PRECOND=1
$TABLE ID TIME DV CIPREDI PRED CWRES ETA_V1 ETA_CL ETA_V2 ETA_V3 ETA_KA IPRED FILE=mytab NOAPPEND NOPRINT
$TABLE ID Age Weight Height Fat SCR ALT AST ALP Albumin BR CLCR BMI ONEHEADER NOPRINT FILE=cotab
$TABLE ID Race Sex Obese ONEHEADER NOPRINT FILE=catab
