$PROBLEM
$INPUT Age Weight Height Fat SCR ALT AST ALP Albumin BR Race Sex CLCR BMI Obese ID AMT TIME ADDL II EVID CMT STUD MDV DV RATE
$DATA strm_6_sm_1_covmodel_3_table.csv IGNORE=@
$SUBROUTINES ADVAN13 TOL=9
$MODEL COMPARTMENT=(CENTRAL DEFDOSE)
$PK
ETA_V=ETA(1)
ETA_CL=ETA(2)
ETA_D1=ETA(3)
TVKM = THETA(5)
KM = TVKM
TVVMAX = THETA(4)
VMAX = TVVMAX
TVCL = THETA(3)
CL = TVCL*EXP(ETA_CL)
TVD1 = THETA(2)
D1 = TVD1*EXP(ETA_D1)
TVV = THETA(1)
V = TVV*EXP(ETA_V)
$DES
DADT(1) = -A(1)*(CL/V + VMAX/(V*(A(1)/V + KM)))
$ERROR
IPRED = A(1)/V
Y = IPRED + EPS(1)*IPRED + EPS(2)
$THETA  (0,628.0) ; POP_V
$THETA  (0,4.0) ; POP_D1
$THETA  (0,15.0) ; POP_CL
$THETA  (0,150.0) ; POP_VMAX
$THETA  (0,10.0) ; POP_KM
$OMEGA BLOCK(2)
0.0392207131532813	; IIV_V
0.0078441426306562	; IIV_CL_IIV_V
0.0488112136893619	; IIV_CL
$OMEGA  0.0392207131532813 ; IIV_D1
$SIGMA  0.0024968801985871 ; sigma_prop
$SIGMA  1e-05 FIX ; sigma_add
$ESTIMATION METHOD=COND INTER MAXEVAL=99999 SIGDIGITS = 3
$COVARIANCE MATRIX=R UNCONDITIONAL PRINT=E PRECOND=1
$TABLE ID TIME DV CIPREDI PRED CWRES ETA_V ETA_CL ETA_D1 IPRED FILE=mytab NOAPPEND NOPRINT
$TABLE ID Age Weight Height Fat SCR ALT AST ALP Albumin BR CLCR BMI ONEHEADER NOPRINT FILE=cotab
$TABLE ID Race Sex Obese ONEHEADER NOPRINT FILE=catab
