$PROBLEM
$INPUT AGE WEIGHT HEIGHT FAT SCR ALT AST ALP ALBUMIN BILIRUBIN HISP WHITE AFRAMER ASIAN SEX CLCR BMI OBESE ID AMT TIME ADDL II EVID CMT STUD MDV DV
$DATA strm_2_statm_1_covm_29_clint_pooled_covs_unchanged_table.csv IGNORE=@
$SUBROUTINES ADVAN4 TRANS4
$PK
ETA_V2=ETA(1)
ETA_KA=ETA(2)
ETA_CL=ETA(3)
BMI_MEDIAN = 27.4372062121463
AGE_MEDIAN = 35.0000000000000
ALBUMIN_MEDIAN = 4.30000000000000
WEIGHT_MEDIAN = 75.9000000000000
BILIRUBIN_MEDIAN = 0.500000000000000
CLCR_MEDIAN = 125.418724279835
TVCL = THETA(5)
CL = TVCL*EXP(ETA_CL)
CLCLCR = EXP(THETA(6)*(CLCR - CLCR_MEDIAN))
CLBILIRUBIN = EXP(THETA(7)*(BILIRUBIN - BILIRUBIN_MEDIAN))
CL = CL*CLBILIRUBIN*CLCLCR
TVKA = THETA(4)
KA = TVKA*EXP(ETA_KA)
KAAGE = EXP(THETA(10)*(AGE - AGE_MEDIAN))
KABMI = EXP(THETA(11)*(BMI - BMI_MEDIAN))
KA = KA*KAAGE*KABMI
TVQ = THETA(3)
Q = TVQ
TVV3 = THETA(2)
V3 = TVV3
TVV2 = THETA(1)
V2 = TVV2*EXP(ETA_V2)
V2WEIGHT = EXP(THETA(8)*(WEIGHT - WEIGHT_MEDIAN))
V2ALBUMIN = EXP(THETA(9)*(ALBUMIN - ALBUMIN_MEDIAN))
V2 = V2*V2ALBUMIN*V2WEIGHT
$ERROR
IPRED = A(2)/V2
IF (IPRED.EQ.0) THEN
    IPREDADJ = 0.000140783618194974
ELSE
    IPREDADJ = IPRED
END IF
Y = IPRED + EPS(1)*IPREDADJ
$THETA  (0,628.0) ; POP_V2
$THETA  (0,1900.0) ; POP_V3
$THETA  (0,22.9) ; POP_Q
$THETA  (0,0.75) ; POP_KA
$THETA  (0,19.2) ; POP_CL
$THETA  (-0.0089,0.0013,0.0089) ; POP_CLCLCR
$THETA  (-0.7143,0.1839,0.7143) ; POP_CLBILIRUBIN
$THETA  (-0.0184,0.0025,0.0184) ; POP_V2WEIGHT
$THETA  (-2,0.1505,2) ; POP_V2ALBUMIN
$THETA  (-0.0833,0.0044,0.0833) ; POP_KAAGE
$THETA  (-0.0556,0.0076,0.0556) ; POP_KABMI
$OMEGA  0.1844027229977793 ; IIV_V2
$OMEGA  0.1844027229977793 ; IIV_KA
$OMEGA  0.0861776962410524 ; IIV_CL
$SIGMA  0.04 ; sigma
$ESTIMATION METHOD=COND INTER MAXEVAL=99999 SIGDIGITS = 3
$COVARIANCE MATRIX=R UNCONDITIONAL PRINT=E PRECOND=1
$TABLE ID TIME DV CIPREDI PRED CWRES ETA_V2 ETA_KA ETA_CL IPRED FILE=mytab ONEHEADER NOAPPEND NOPRINT
