$PROBLEM
$INPUT ID AMT TIME ADDL II EVID CMT STUD MDV TAD DOSE DV AGE WEIGHT HEIGHT FAT SCR ALT AST ALP ALBUMIN BILIRUBIN CLCR BMI HISP WHITE AFRAMER ASIAN SEX OBESE
$DATA strm_2_statm_1_covm_30_clint_pooled_covs_unchanged_table.csv IGNORE=@
$SUBROUTINES ADVAN4 TRANS4
$PK
ETA_V2=ETA(1)
ETA_KA=ETA(2)
ETA_CL=ETA(3)
WEIGHT_MEDIAN = 75.9000000000000
ALBUMIN_MEDIAN = 4.30000000000000
CLCR_MEDIAN = 75.7365084302190
AGE_MEDIAN = 35.0000000000000
BILIRUBIN_MEDIAN = 0.500000000000000
TVCL = THETA(5)
CL = TVCL*EXP(ETA_CL)
CLBILIRUBIN = EXP(THETA(6)*(BILIRUBIN - BILIRUBIN_MEDIAN))
CLAGE = EXP(THETA(7)*(AGE - AGE_MEDIAN))
CLCLCR = EXP(THETA(8)*(CLCR - CLCR_MEDIAN))
CL = CL*CLAGE*CLBILIRUBIN*CLCLCR
TVKA = THETA(4)
KA = TVKA*EXP(ETA_KA)
TVQ = THETA(3)
Q = TVQ
TVV3 = THETA(2)
V3 = TVV3
TVV2 = THETA(1)
V2 = TVV2*EXP(ETA_V2)
V2ALBUMIN = EXP(THETA(9)*(ALBUMIN - ALBUMIN_MEDIAN))
V2AGE = EXP(THETA(10)*(AGE - AGE_MEDIAN))
V2WEIGHT = EXP(THETA(11)*(WEIGHT - WEIGHT_MEDIAN))
V2 = V2*V2AGE*V2ALBUMIN*V2WEIGHT
$ERROR
IPRED = A(2)/V2
IF (IPRED.EQ.0) THEN
    IPREDADJ = 0.000122436505008974
ELSE
    IPREDADJ = IPRED
END IF
Y = IPRED + EPS(1)*IPREDADJ
$THETA  (0,628.0) ; POP_V2
$THETA  (0,1900.0) ; POP_V3
$THETA  (0,22.9) ; POP_Q
$THETA  (0,0.75) ; POP_KA
$THETA  (0,19.2) ; POP_CL
$THETA  (-0.7143,0.0542,0.7143) ; POP_CLBILIRUBIN
$THETA  (-0.0833,0.0013,0.0833) ; POP_CLAGE
$THETA  (-0.0073,0.0005,0.0073) ; POP_CLCLCR
$THETA  (-2,0.0488,2) ; POP_V2ALBUMIN
$THETA  (-0.0833,0.0013,0.0833) ; POP_V2AGE
$THETA  (-0.0184,0.0007,0.0184) ; POP_V2WEIGHT
$OMEGA  0.1844027229977793 ; IIV_V2
$OMEGA  0.1844027229977793 ; IIV_KA
$OMEGA  0.0861776962410524 ; IIV_CL
$SIGMA  0.04 ; sigma
$ESTIMATION METHOD=COND INTER MAXEVAL=99999 SIGDIGITS = 3
$COVARIANCE MATRIX=R UNCONDITIONAL PRINT=E PRECOND=1
$TABLE ID TIME DV CIPREDI PRED CWRES ETA_V2 ETA_KA ETA_CL IPRED FILE=mytab ONEHEADER NOAPPEND NOPRINT
